// SBML level 2 version 4
// dcterms:bibliographicCitation: urn:miriam:doi:doi:10.1074/jbc.M113.474908
// dcterms:bibliographicCitation: urn:miriam:pubmed:18620547
// dcterms:bibliographicCitation: urn:miriam:pubmed:15383589
// dcterms:bibliographicCitation: urn:miriam:pubmed:18370401
// dcterms:bibliographicCitation: urn:miriam:pubmed:4991409
// dcterms:bibliographicCitation: urn:miriam:pubmed:19143568
// dcterms:bibliographicCitation: urn:miriam:pubmed:457635
// dcterms:bibliographicCitation: urn:miriam:pubmed:17300176
// dcterms:bibliographicCitation: urn:miriam:pubmed:15663479
// dcterms:bibliographicCitation: urn:miriam:pubmed:19816759
// dcterms:bibliographicCitation: urn:miriam:pubmed:4190298
// dcterms:bibliographicCitation: urn:miriam:pubmed:10672018
// dcterms:bibliographicCitation: urn:miriam:pubmed:16973376
// dcterms:bibliographicCitation: urn:miriam:pubmed:9852119
// dcterms:bibliographicCitation: urn:miriam:pubmed:3949799
// dcterms:bibliographicCitation: urn:miriam:pubmed:3112306
// dcterms:bibliographicCitation: urn:miriam:pubmed:12672479
// dcterms:bibliographicCitation: urn:miriam:pubmed:18547057
// dcterms:bibliographicCitation: urn:miriam:pubmed:19737010
// dcterms:bibliographicCitation: urn:miriam:pubmed:26687
// dcterms:bibliographicCitation: urn:miriam:pubmed:11676605
// dcterms:bibliographicCitation: urn:miriam:pubmed:4135014
// dcterms:bibliographicCitation: urn:miriam:pubmed:15656614
// dcterms:bibliographicCitation: urn:miriam:pubmed:11754741
// dcterms:bibliographicCitation: urn:miriam:pubmed:2949752
// dcterms:bibliographicCitation: urn:miriam:pubmed:2872885
// dcterms:bibliographicCitation: urn:miriam:pubmed:17868694
// dcterms:bibliographicCitation: urn:miriam:pubmed:118164
// dcterms:bibliographicCitation: urn:miriam:pubmed:17402747
// dcterms:bibliographicCitation: urn:miriam:pubmed:17288562
// dcterms:bibliographicCitation: urn:miriam:pubmed:15848762
// dcterms:bibliographicCitation: urn:miriam:pubmed:15477086
// dcterms:bibliographicCitation: Km urn:miriam:pubmed:18771288
// dcterms:bibliographicCitation: Kcat urn:miriam:pubmed:15477086
// dcterms:bibliographicCitation: Km urn:miriam:pubmed:2723766

function function_4_DDC_5HT(DDC_E_T, DDC_Km_5htrp, DDC_Km_trp_DASH_L, M_5htrp_c, M_trp_DASH_L_c, kcat_B, scaling)
  DDC_E_T*kcat_B*scaling*M_5htrp_c*DDC_Km_trp_DASH_L/(DDC_Km_5htrp*DDC_Km_trp_DASH_L + DDC_Km_5htrp*M_trp_DASH_L_c + DDC_Km_trp_DASH_L*M_5htrp_c);
end

function function_4_IL4I1_kcat_set_to_1(E_T, Ka, Kb, M_h2o_c, M_o2_c, M_trp_DASH_L_c, kcat, scaling)
  kcat*E_T*M_trp_DASH_L_c*M_o2_c*M_h2o_c*scaling/(Ka*Kb + Kb*M_trp_DASH_L_c + Ka*M_o2_c + M_trp_DASH_L_c*M_o2_c);
end

function function_4_AADAT_hLkynr_kat3(AADAT_E_T_kat3, AADAT_Km_Lkynr, AADAT_Km_hLkynr, AADAT_kcat_hLkynr, M_Lkynr_c, M_hLkynr_c, scaling)
  AADAT_E_T_kat3*AADAT_kcat_hLkynr*scaling*M_hLkynr_c*AADAT_Km_Lkynr/(AADAT_Km_hLkynr*AADAT_Km_Lkynr + AADAT_Km_hLkynr*M_Lkynr_c + AADAT_Km_Lkynr*M_hLkynr_c);
end

function function_4_TDO_1(E_T, Ka, Kb, M_o2_c, M_trp_DASH_L_c, kcat, scaling)
  kcat*E_T*M_trp_DASH_L_c*M_o2_c*scaling/(Ka*Kb + Ka*M_o2_c + Kb*M_trp_DASH_L_c + M_trp_DASH_L_c*M_o2_c);
end

function function_4_DDC_trypta(DDC_E_T, DDC_Km_5htrp, DDC_Km_trp_DASH_L, M_5htrp_c, M_trp_DASH_L_c, kcat_B, scaling)
  DDC_E_T*kcat_B*scaling*M_trp_DASH_L_c*DDC_Km_5htrp/(DDC_Km_trp_DASH_L*DDC_Km_5htrp + DDC_Km_trp_DASH_L*M_5htrp_c + DDC_Km_5htrp*M_trp_DASH_L_c);
end

function function_4_AADAT_Lkynr_kat2(AADAT_E_T_kat2, AADAT_Km_Lkynr, AADAT_Km_hLkynr, AADAT_kcat_Lkynr, M_Lkynr_c, M_hLkynr_c, scaling)
  AADAT_E_T_kat2*AADAT_kcat_Lkynr*scaling*M_Lkynr_c*AADAT_Km_hLkynr/(AADAT_Km_Lkynr*AADAT_Km_hLkynr + AADAT_Km_Lkynr*M_hLkynr_c + AADAT_Km_hLkynr*M_Lkynr_c);
end

function function_4_KYNU_Lkynr(KYNU_E_T, KYNU_Km_Lfmkynr, KYNU_Km_Lkynr, KYNU_Km_hLkynr, M_Lfmkynr_c, M_Lkynr_c, M_hLkynr_c, kcat_A, scaling)
  KYNU_E_T*kcat_A*scaling*M_Lkynr_c*KYNU_Km_hLkynr*KYNU_Km_Lfmkynr/(KYNU_Km_Lkynr*KYNU_Km_hLkynr*KYNU_Km_Lfmkynr + KYNU_Km_hLkynr*KYNU_Km_Lfmkynr*M_Lkynr_c + KYNU_Km_Lkynr*KYNU_Km_Lfmkynr*M_hLkynr_c + KYNU_Km_Lkynr*KYNU_Km_hLkynr*M_Lfmkynr_c);
end

function function_4_KYNU_hLkynr(KYNU_E_T, KYNU_Km_Lfmkynr, KYNU_Km_Lkynr, KYNU_Km_hLkynr, M_Lfmkynr_c, M_Lkynr_c, M_hLkynr_c, kcat_A, scaling)
  KYNU_E_T*kcat_A*scaling*M_hLkynr_c*KYNU_Km_Lkynr*KYNU_Km_Lfmkynr/(KYNU_Km_hLkynr*KYNU_Km_Lkynr*KYNU_Km_Lfmkynr + KYNU_Km_Lkynr*KYNU_Km_Lfmkynr*M_hLkynr_c + KYNU_Km_hLkynr*KYNU_Km_Lfmkynr*M_Lkynr_c + KYNU_Km_hLkynr*KYNU_Km_Lkynr*M_Lfmkynr_c);
end

function function_4_HAAO_1(E_T, Ka, Kb, M_3hanthrn_c, M_o2_c, kcat, scaling)
  kcat*E_T*M_3hanthrn_c*M_o2_c*scaling/(Ka*Kb + Ka*M_o2_c + Kb*M_3hanthrn_c + M_3hanthrn_c*M_o2_c);
end

function function_4_KMO_1(E_T, Ka, Kb, Kc, M_Lkynr_c, M_h_c, M_nadph_c, M_o2_c, kcat, scaling)
  kcat*E_T*M_Lkynr_c*M_o2_c*M_nadph_c*M_h_c*scaling/(Ka*Kb*Kc + M_Lkynr_c*Kb*Kc + M_o2_c*Ka*Kc + M_nadph_c*Ka*Kb + M_Lkynr_c*M_o2_c*Kc + M_o2_c*M_nadph_c*Ka + M_Lkynr_c*M_nadph_c*Kb + M_Lkynr_c*M_o2_c*M_nadph_c);
end

function function_4_AFMID_lfmkynr(AFMID_E_T, AFMID_Km_5hoxnfky, AFMID_Km_Lfmkynr, AFMID_Km_nformanth, M_5hoxnfkyn_c, M_Lfmkynr_c, M_nformanth_c, kcat_A, scaling)
  AFMID_E_T*kcat_A*scaling*M_Lfmkynr_c*AFMID_Km_5hoxnfky*AFMID_Km_nformanth/(AFMID_Km_Lfmkynr*AFMID_Km_5hoxnfky*AFMID_Km_nformanth + AFMID_Km_5hoxnfky*AFMID_Km_nformanth*M_Lfmkynr_c + AFMID_Km_Lfmkynr*AFMID_Km_nformanth*M_5hoxnfkyn_c + AFMID_Km_Lfmkynr*AFMID_Km_5hoxnfky*M_nformanth_c);
end

function function_4_TPH1(E_T, Ka, Kb, M_o2_c, M_thbpt, M_trp_DASH_L_c, kcat, scaling)
  kcat*E_T*M_trp_DASH_L_c*M_o2_c*M_thbpt*scaling/(Ka*Kb + Kb*M_trp_DASH_L_c + Ka*M_o2_c + M_trp_DASH_L_c*M_o2_c);
end

function function_4_INMT_trypta(IMNT_E_T, IMNT_Km_nmtrpta, IMNT_Km_srtn, IMNT_Km_trypta, M_nmtrpta_c, M_srtn_c, M_trypta_c, kcat_A, scaling)
  IMNT_E_T*kcat_A*scaling*M_trypta_c*IMNT_Km_nmtrpta*IMNT_Km_srtn/(IMNT_Km_trypta*IMNT_Km_nmtrpta*IMNT_Km_srtn + IMNT_Km_nmtrpta*IMNT_Km_srtn*M_trypta_c + IMNT_Km_trypta*IMNT_Km_srtn*M_nmtrpta_c + IMNT_Km_trypta*IMNT_Km_nmtrpta*M_srtn_c);
end

function function_4_AADAT_Lkynr_kat1(AADAT_E_T_kat1, AADAT_Km_Lkynr, AADAT_Km_hLkynr, AADAT_kcat_Lkynr, M_Lkynr_c, M_hLkynr_c, scaling)
  AADAT_E_T_kat1*AADAT_kcat_Lkynr*scaling*M_Lkynr_c*AADAT_Km_hLkynr/(AADAT_Km_Lkynr*AADAT_Km_hLkynr + AADAT_Km_Lkynr*M_hLkynr_c + AADAT_Km_hLkynr*M_Lkynr_c);
end

function function_4_IDO_5HT_1(IDO_E_T, IDO_Km_5htrp, IDO_Km_O2, IDO_Km_srtn, IDO_Km_trp_DASH_L, M_5htrp_c, M_o2_c, M_srtn_c, M_trp_DASH_L_c, kcat, scaling)
  kcat*IDO_E_T*M_5htrp_c*M_o2_c*IDO_Km_trp_DASH_L*IDO_Km_srtn*scaling/(IDO_Km_5htrp*IDO_Km_O2*IDO_Km_trp_DASH_L*IDO_Km_srtn + M_5htrp_c*IDO_Km_O2*IDO_Km_trp_DASH_L*IDO_Km_srtn + M_o2_c*IDO_Km_5htrp*IDO_Km_trp_DASH_L*IDO_Km_srtn + M_trp_DASH_L_c*IDO_Km_5htrp*IDO_Km_O2*IDO_Km_srtn + M_srtn_c*IDO_Km_5htrp*IDO_Km_O2*IDO_Km_trp_DASH_L + M_5htrp_c*M_o2_c*IDO_Km_trp_DASH_L*IDO_Km_srtn + M_trp_DASH_L_c*M_o2_c*IDO_Km_5htrp*IDO_Km_srtn + M_srtn_c*M_o2_c*IDO_Km_5htrp*IDO_Km_trp_DASH_L);
end

function function_4_WARS2_tRNA_recombinant_assume_km_equal_Ka_or_Kb(E_T, Ka, Kb, M_atp_c, M_trna_trp_c, M_trp_DASH_L_c, kcat, scaling)
  kcat*E_T*M_trp_DASH_L_c*M_trna_trp_c*M_atp_c*scaling/(Ka*Kb + Kb*M_trp_DASH_L_c + Ka*M_trna_trp_c + M_trp_DASH_L_c*M_trna_trp_c);
end

function function_4_AFMID_5HNFK(AFMID_E_T, AFMID_Km_5hoxnfky, AFMID_Km_Lfmkynr, AFMID_Km_nformanth, M_5hoxnfkyn_c, M_Lfmkynr_c, M_nformanth_c, kcat_A, scaling)
  AFMID_E_T*kcat_A*scaling*M_5hoxnfkyn_c*AFMID_Km_Lfmkynr*AFMID_Km_nformanth/(AFMID_Km_5hoxnfky*AFMID_Km_Lfmkynr*AFMID_Km_nformanth + AFMID_Km_Lfmkynr*AFMID_Km_nformanth*M_5hoxnfkyn_c + AFMID_Km_5hoxnfky*AFMID_Km_nformanth*M_Lfmkynr_c + AFMID_Km_5hoxnfky*AFMID_Km_Lfmkynr*M_nformanth_c);
end

function function_4_MAOA_Trypta(MAOA_E_T, MAO_Km_srtn, MAO_Km_trypta, M_srtn_c, M_trypta_c, kcat_B, scaling)
  MAOA_E_T*kcat_B*scaling*M_trypta_c*MAO_Km_srtn/(MAO_Km_trypta*MAO_Km_srtn + MAO_Km_trypta*M_srtn_c + MAO_Km_srtn*M_trypta_c);
end

function function_1(M_3hanthrn_c, M_o2_c, e1, e2, k1)
  k1*M_3hanthrn_c^e1*M_o2_c^e2;
end
function_1 is "function_4_Cinnavalinate formation";

function function_4_IDO_1(IDO_E_T, IDO_Km_5htrp, IDO_Km_O2, IDO_Km_srtn, IDO_Km_trp_DASH_L, M_5htrp_c, M_o2_c, M_srtn_c, M_trp_DASH_L_c, kcat, scaling)
  kcat*IDO_E_T*M_trp_DASH_L_c*M_o2_c*IDO_Km_5htrp*IDO_Km_srtn*scaling/(IDO_Km_trp_DASH_L*IDO_Km_O2*IDO_Km_5htrp*IDO_Km_srtn + M_trp_DASH_L_c*IDO_Km_O2*IDO_Km_5htrp*IDO_Km_srtn + M_o2_c*IDO_Km_trp_DASH_L*IDO_Km_5htrp*IDO_Km_srtn + M_5htrp_c*IDO_Km_trp_DASH_L*IDO_Km_O2*IDO_Km_srtn + M_srtn_c*IDO_Km_trp_DASH_L*IDO_Km_O2*IDO_Km_5htrp + M_trp_DASH_L_c*M_o2_c*IDO_Km_5htrp*IDO_Km_srtn + M_5htrp_c*M_o2_c*IDO_Km_trp_DASH_L*IDO_Km_srtn + M_srtn_c*M_o2_c*IDO_Km_trp_DASH_L*IDO_Km_5htrp);
end

function function_4_NMNAT1(E_T, Km, M_atp_c, M_h_c, M_nicrnt_c, kcat, scaling)
  E_T*kcat*M_nicrnt_c*M_h_c*M_atp_c*scaling/(Km + M_nicrnt_c);
end

function function_4_ACMSD(E_T, Km, M_cmusa_c, kcat, scaling)
  E_T*kcat*M_cmusa_c*scaling/(Km + M_cmusa_c);
end

function function_4_QPRT(E_T, Ka, Kb, M_h_c, M_prpp_c, M_quln_c, kcat, scaling)
  kcat*E_T*M_quln_c*M_prpp_c*M_h_c*scaling/(Ka*Kb + Kb*M_quln_c + Ka*M_prpp_c + M_quln_c*M_prpp_c);
end

function function_4_KYNU_Lfmkyn(KYNU_E_T, KYNU_Km_Lfmkynr, KYNU_Km_Lkynr, KYNU_Km_hLkynr, M_Lfmkynr_c, M_Lkynr_c, M_hLkynr_c, kcat_A, scaling)
  KYNU_E_T*kcat_A*scaling*M_Lfmkynr_c*KYNU_Km_Lkynr*KYNU_Km_hLkynr/(KYNU_Km_Lfmkynr*KYNU_Km_Lkynr*KYNU_Km_hLkynr + KYNU_Km_Lkynr*KYNU_Km_hLkynr*M_Lfmkynr_c + KYNU_Km_Lfmkynr*KYNU_Km_hLkynr*M_Lkynr_c + KYNU_Km_Lfmkynr*KYNU_Km_Lkynr*M_hLkynr_c);
end

function function_4_AFMID_nform(AFMID_E_T, AFMID_Km_5hoxnfky, AFMID_Km_Lfmkynr, AFMID_Km_nformanth, M_5hoxnfkyn_c, M_Lfmkynr_c, M_nformanth_c, kcat_A, scaling)
  AFMID_E_T*kcat_A*scaling*M_nformanth_c*AFMID_Km_Lfmkynr*AFMID_Km_5hoxnfky/(AFMID_Km_nformanth*AFMID_Km_Lfmkynr*AFMID_Km_5hoxnfky + AFMID_Km_Lfmkynr*AFMID_Km_5hoxnfky*M_nformanth_c + AFMID_Km_nformanth*AFMID_Km_5hoxnfky*M_Lfmkynr_c + AFMID_Km_nformanth*AFMID_Km_Lfmkynr*M_5hoxnfkyn_c);
end

function function_4_MAOA_SRTN(MAOA_E_T, MAO_Km_srtn, MAO_Km_trypta, M_srtn_c, M_trypta_c, kcat_B, scaling)
  MAOA_E_T*kcat_B*scaling*M_srtn_c*MAO_Km_trypta/(MAO_Km_srtn*MAO_Km_trypta + MAO_Km_srtn*M_trypta_c + MAO_Km_trypta*M_srtn_c);
end

function function_4_INMT_methyltrypta(IMNT_E_T, IMNT_Km_nmtrpta, IMNT_Km_srtn, IMNT_Km_trypta, M_nmtrpta_c, M_srtn_c, M_trypta_c, kcat_A, scaling)
  IMNT_E_T*kcat_A*scaling*M_nmtrpta_c*IMNT_Km_srtn*IMNT_Km_trypta/(IMNT_Km_nmtrpta*IMNT_Km_srtn*IMNT_Km_trypta + IMNT_Km_srtn*IMNT_Km_trypta*M_nmtrpta_c + IMNT_Km_nmtrpta*IMNT_Km_trypta*M_srtn_c + IMNT_Km_nmtrpta*IMNT_Km_srtn*M_trypta_c);
end

function function_4_AADAT_hLkynr_kat1(AADAT_E_T_kat1, AADAT_Km_Lkynr, AADAT_Km_hLkynr, AADAT_kcat_hLkynr, M_Lkynr_c, M_hLkynr_c, scaling)
  AADAT_E_T_kat1*AADAT_kcat_hLkynr*scaling*M_hLkynr_c*AADAT_Km_Lkynr/(AADAT_Km_hLkynr*AADAT_Km_Lkynr + AADAT_Km_hLkynr*M_Lkynr_c + AADAT_Km_Lkynr*M_hLkynr_c);
end

function function_4_IDO_SRTN_1(IDO_E_T, IDO_Km_5htrp, IDO_Km_O2, IDO_Km_srtn, IDO_Km_trp_DASH_L, M_5htrp_c, M_o2_c, M_srtn_c, M_trp_DASH_L_c, kcat, scaling)
  kcat*IDO_E_T*M_srtn_c*M_o2_c*IDO_Km_5htrp*IDO_Km_trp_DASH_L*scaling/(IDO_Km_srtn*IDO_Km_O2*IDO_Km_5htrp*IDO_Km_trp_DASH_L + M_srtn_c*IDO_Km_O2*IDO_Km_5htrp*IDO_Km_trp_DASH_L + M_o2_c*IDO_Km_srtn*IDO_Km_5htrp*IDO_Km_trp_DASH_L + M_5htrp_c*IDO_Km_srtn*IDO_Km_O2*IDO_Km_trp_DASH_L + M_trp_DASH_L_c*IDO_Km_srtn*IDO_Km_O2*IDO_Km_5htrp + M_srtn_c*M_o2_c*IDO_Km_5htrp*IDO_Km_trp_DASH_L + M_5htrp_c*M_o2_c*IDO_Km_srtn*IDO_Km_trp_DASH_L + M_trp_DASH_L_c*M_o2_c*IDO_Km_srtn*IDO_Km_5htrp);
end

function function_4_MAOB_SRTN(MAOB_E_T, MAO_Km_srtn, MAO_Km_trypta, M_srtn_c, M_trypta_c, kcat_B, scaling)
  MAOB_E_T*kcat_B*scaling*M_srtn_c*MAO_Km_trypta/(MAO_Km_srtn*MAO_Km_trypta + MAO_Km_srtn*M_trypta_c + MAO_Km_trypta*M_srtn_c);
end

function function_4_INMT_SRTN(IMNT_E_T, IMNT_Km_nmtrpta, IMNT_Km_srtn, IMNT_Km_trypta, M_nmtrpta_c, M_srtn_c, M_trypta_c, kcat_A, scaling)
  IMNT_E_T*kcat_A*scaling*M_srtn_c*IMNT_Km_nmtrpta*IMNT_Km_trypta/(IMNT_Km_srtn*IMNT_Km_nmtrpta*IMNT_Km_trypta + IMNT_Km_nmtrpta*IMNT_Km_trypta*M_srtn_c + IMNT_Km_srtn*IMNT_Km_trypta*M_nmtrpta_c + IMNT_Km_srtn*IMNT_Km_nmtrpta*M_trypta_c);
end

function function_4_AADAT_hLkynr_kat2(AADAT_E_T_kat2, AADAT_Km_Lkynr, AADAT_Km_hLkynr, AADAT_kcat_hLkynr, M_Lkynr_c, M_hLkynr_c, scaling)
  AADAT_E_T_kat2*AADAT_kcat_hLkynr*scaling*M_hLkynr_c*AADAT_Km_Lkynr/(AADAT_Km_hLkynr*AADAT_Km_Lkynr + AADAT_Km_hLkynr*M_Lkynr_c + AADAT_Km_Lkynr*M_hLkynr_c);
end

function function_4_AADAT_Lkynr_kat3(AADAT_E_T_kat3, AADAT_Km_Lkynr, AADAT_Km_hLkynr, AADAT_kcat_Lkynr, M_Lkynr_c, M_hLkynr_c, scaling)
  AADAT_E_T_kat3*AADAT_kcat_Lkynr*scaling*M_Lkynr_c*AADAT_Km_hLkynr/(AADAT_Km_Lkynr*AADAT_Km_hLkynr + AADAT_Km_Lkynr*M_hLkynr_c + AADAT_Km_hLkynr*M_Lkynr_c);
end

function function_4_AANAT_Srtn(AANAT_E_T, AANAT_Km_Srtn, AANAT_Km_trypta, M_srtn_c, M_trypta_c, kcat_B, scaling)
  AANAT_E_T*kcat_B*scaling*M_srtn_c*AANAT_Km_trypta/(AANAT_Km_Srtn*AANAT_Km_trypta + AANAT_Km_Srtn*M_trypta_c + AANAT_Km_trypta*M_srtn_c);
end

function function_4_MAOB_Trypta(MAOB_E_T, MAO_Km_srtn, MAO_Km_trypta, M_srtn_c, M_trypta_c, kcat_B, scaling)
  MAOB_E_T*kcat_B*scaling*M_trypta_c*MAO_Km_srtn/(MAO_Km_trypta*MAO_Km_srtn + MAO_Km_trypta*M_srtn_c + MAO_Km_srtn*M_trypta_c);
end

function function_4_AANAT_trypta(AANAT_E_T, AANAT_Km_Srtn, AANAT_Km_trypta, M_srtn_c, M_trypta_c, kcat_B, scaling)
  AANAT_E_T*kcat_B*scaling*M_trypta_c*AANAT_Km_Srtn/(AANAT_Km_trypta*AANAT_Km_Srtn + AANAT_Km_trypta*M_srtn_c + AANAT_Km_Srtn*M_trypta_c);
end

function function_4_TPH2(E_T, Ka, Kb, M_o2_c, M_thbpt, M_trp_DASH_L_c, kcat, scaling)
  kcat*E_T*M_trp_DASH_L_c*M_o2_c*M_thbpt*scaling/(Ka*Kb + Kb*M_trp_DASH_L_c + Ka*M_o2_c + M_trp_DASH_L_c*M_o2_c);
end

function Slc7a5_Trp_1(M_Lkynr_c, M_Lkynr_ex, M_trp_DASH_L_c, TRP_ex, Transporter_E_T_Slc7a5, Transporter_Km_Lkynr, Transporter_Km_Trp_Slc7a5, Transporter_kcat_Trp, scaling)
  scaling*(Transporter_E_T_Slc7a5*Transporter_kcat_Trp*TRP_ex/Transporter_Km_Trp_Slc7a5 - Transporter_E_T_Slc7a5*Transporter_kcat_Trp*M_trp_DASH_L_c/Transporter_Km_Trp_Slc7a5)/(1 + TRP_ex/Transporter_Km_Trp_Slc7a5 + M_Lkynr_ex/Transporter_Km_Lkynr + M_trp_DASH_L_c/Transporter_Km_Trp_Slc7a5 + M_Lkynr_c/Transporter_Km_Lkynr);
end

function Slc7a8_Trp_1(M_Lkynr_c, M_Lkynr_ex, M_trp_DASH_L_c, TRP_ex, Transporter_E_T_Slc7a8, Transporter_Km_Lkynr, Transporter_Km_Trp_Slc7a8, Transporter_kcat_Trp, scaling)
  scaling*(Transporter_E_T_Slc7a8*Transporter_kcat_Trp*TRP_ex/Transporter_Km_Trp_Slc7a8 - Transporter_E_T_Slc7a8*Transporter_kcat_Trp*M_trp_DASH_L_c/Transporter_Km_Trp_Slc7a8)/(1 + TRP_ex/Transporter_Km_Trp_Slc7a8 + M_Lkynr_ex/Transporter_Km_Lkynr + M_trp_DASH_L_c/Transporter_Km_Trp_Slc7a8 + M_Lkynr_c/Transporter_Km_Lkynr);
end

function Slc7a5_LKyn_1(M_Lkynr_c, M_Lkynr_ex, M_trp_DASH_L_c, TRP_ex, Transporter_E_T_Slc7a5, Transporter_Km_Lkynr, Transporter_Km_Trp_Slc7a5, Transporter_kcat_Lkynr, scaling)
  scaling*(Transporter_E_T_Slc7a5*Transporter_kcat_Lkynr*M_Lkynr_c/Transporter_Km_Lkynr - Transporter_E_T_Slc7a5*Transporter_kcat_Lkynr*M_Lkynr_ex/Transporter_Km_Lkynr)/(1 + M_Lkynr_c/Transporter_Km_Lkynr + M_trp_DASH_L_c/Transporter_Km_Trp_Slc7a5 + M_Lkynr_ex/Transporter_Km_Lkynr + TRP_ex/Transporter_Km_Trp_Slc7a5);
end

function Slc7a8_LKyn_1(M_Lkynr_c, M_Lkynr_ex, M_trp_DASH_L_c, TRP_ex, Transporter_E_T_Slc7a8, Transporter_Km_Lkynr, Transporter_Km_Trp_Slc7a8, Transporter_kcat_Lkynr, scaling)
  scaling*(Transporter_E_T_Slc7a8*Transporter_kcat_Lkynr*M_Lkynr_c/Transporter_Km_Lkynr - Transporter_E_T_Slc7a8*Transporter_kcat_Lkynr*M_Lkynr_ex/Transporter_Km_Lkynr)/(1 + M_Lkynr_c/Transporter_Km_Lkynr + M_trp_DASH_L_c/Transporter_Km_Trp_Slc7a8 + M_Lkynr_ex/Transporter_Km_Lkynr + TRP_ex/Transporter_Km_Trp_Slc7a8);
end

model MODEL1310160000()
  // Stavrum2013 - Tryptophan Metabolism in Liver
  // This model is from the paper:
  // Anne-Kristin Stavrum, Ines Heiland, Stefan Schuster, Pål Puntervoll, and Mathias Ziegler. (2013) Model of Tryptophan Metabolism, Readily Scalable using Tissue-Specific Gene Expression Data. J. Biol. Chem. published October 15, 2013 as doi:10.1074/jbc.M113.474908
  // Summary:
  // Tryptophan is utilised in various metabolic routes including protein synthesis, serotonin and melatonin synthesis and the kynurenine pathway. Perturbations in these pathways have been associated with neurodegenerative diseases and cancer. Here, we present a comprehensive kinetic model of the complex network of human tryptophan metabolism, based upon existing kinetic data for all enzymatic conversions and transporters. By integrating tissue-specific expression data, modelling tryptophan metabolism in liver and brain returned intermediate metabolite concentrations in the physiological range. Sensitivity and metabolic control analyses identified expected key enzymes to govern fluxes in the branches of the network. Combining tissue-specific models revealed a considerable impact of the kynurenine pathway in liver on the concentrations of neuroactive derivatives in the brain. Moreover, using expression data from a cancer study predicted metabolite changes that resembled the experimental observations. We conclude that the combination of the kinetic model with expression data represents a powerful diagnostic tool to predict alterations in tryptophan metabolism. The model is readily scalable to include more tissues, thereby enabling assessment of organismal tryptophan metabolism in health and disease.
  // isDescribedBy doi:10.1074/jbc.M113.474908
  // biomodels.db:MODEL1310160000

  // Compartments:
  compartment Cytosol = 1;

  // Species:
  species M_3hanthrn_c in Cytosol = 0; M_3hanthrn_c is "M_3HAA";
  species M_5hoxnfkyn_c in Cytosol = 0; M_5hoxnfkyn_c is "M_5HFKyn";
  species M_5htrp_c in Cytosol = 0; M_5htrp_c is "M_5HTrp";
  species $M_5hxkyn_c in Cytosol = 0; M_5hxkyn_c is "M_5HKyn";
  species M_Lfmkynr_c in Cytosol = 0; M_Lfmkynr_c is "M_FKyn";
  species M_Lkynr_c in Cytosol = 0; M_Lkynr_c is "M_L-Kyn";
  species $M_ahcys_c in Cytosol = 1; M_ahcys_c is "M_AHCys";
  species $M_akg_c in Cytosol = 1; M_akg_c is "M_Ketoglutarate";
  species $M_ala_DASH_L_c in Cytosol = 1; M_ala_DASH_L_c is "M_L_ALA";
  species $M_amet_c in Cytosol = 1; M_amet_c is "M_AMet";
  species $M_anth_c in Cytosol = 0; M_anth_c is "M_AA";
  species M_cmusa_c in Cytosol = 0; M_cmusa_c is "M_Acms";
  species $M_dhbpt_c in Cytosol = 1; M_dhbpt_c is "M_Dhbpt";
  species $M_for_c in Cytosol = 0; M_for_c is "M_Formate";
  species $M_glu_DASH_L_c in Cytosol = 0; M_glu_DASH_L_c is "M_LGlu";
  species M_hLkynr_c in Cytosol = 0; M_hLkynr_c is "M_3HKyn";
  species $M_id3acald_c in Cytosol = 0; M_id3acald_c is "M_IndolAc";
  species $M_indpyr_c in Cytosol = 0; M_indpyr_c is "M_IndolP";
  species M_nmtrpta_c in Cytosol = 0; M_nmtrpta_c is "M_MTrypta";
  species M_quln_c in Cytosol = 0; M_quln_c is "M_Quin";
  species M_srtn_c in Cytosol = 0; M_srtn_c is "M_Serotonin";
  species $M_thbpt in Cytosol = 1; M_thbpt is "M_Thbpt";
  species $M_trna_trp_c in Cytosol = 1e-5; M_trna_trp_c is "M_tRNA";
  species M_trp_DASH_L_c in Cytosol = 0; M_trp_DASH_L_c is "M_Trp";
  species $M_trp_L_trna_c in Cytosol = 0; M_trp_L_trna_c is "M_Trp_tRNA";
  species M_trypta_c in Cytosol = 0; M_trypta_c is "M_Trypta";
  species $M_amp_c in Cytosol = 1; M_amp_c is "M_AMP";
  species $M_atp_c in Cytosol = 1; M_atp_c is "M_ATP";
  species $M_co2_c in Cytosol = 1; M_co2_c is "M_CO2";
  species $M_h2o2_c in Cytosol = 0; M_h2o2_c is "M_H2O2";
  species $M_h2o_c in Cytosol = 1; M_h2o_c is "M_H2O";
  species $M_h_c in Cytosol = 1; M_h_c is "M_H";
  species $M_nadp_c in Cytosol = 0; M_nadp_c is "M_NADP";
  species $M_nadph_c in Cytosol = 0.03; M_nadph_c is "M_NADPH";
  species $M_nh4_c in Cytosol = 0; M_nh4_c is "M_NH4";
  species $M_o2_c in Cytosol = 1; M_o2_c is "M_O2";
  species $M_o2s_c in Cytosol = 0; M_o2s_c is "M_O2s";
  species $M_ppi_c in Cytosol = 0; M_ppi_c is "M_PPi";
  species $M_Cinnavalininate_c in Cytosol = 1;
  species $M_kynate_c in Cytosol = 1; M_kynate_c is "M_Kyna";
  species $TRP_ex in Cytosol = 0.005; TRP_ex is "Trp_ex";
  species M_nicrnt_c in Cytosol = 0; M_nicrnt_c is "M_NaMN";
  species $M_prpp_c in Cytosol = 1; M_prpp_c is "M_PRPP";
  species M_nformanth_c in Cytosol = 0; M_nformanth_c is "M_FAA";
  species $M_dnad_c in Cytosol = 0; M_dnad_c is "M_NAAD";
  species $M_am6sa_c in Cytosol = 1; M_am6sa_c is "M_Am6sa";
  species $M_5hoxindact_c in Cytosol = 1; M_5hoxindact_c is "M_5HAc";
  species $M_Nacsertn_c in Cytosol = 0; M_Nacsertn_c is "M_NAcSet";
  species $M_accoa_c in Cytosol = 1; M_accoa_c is "M_AcetylCoA";
  species $M_coa_c in Cytosol = 1; M_coa_c is "M_CoA";
  species $M_Xanthurenate in Cytosol = 0;
  species $M_f5hoxkyn_c in Cytosol = 0; M_f5hoxkyn_c is "M_F5HKyn";
  species $M_nndmtrpta_c in Cytosol = 0; M_nndmtrpta_c is "M_MMTrypta";
  species $M_nmsrtn_c in Cytosol = 0; M_nmsrtn_c is "M_NMSer";
  species $M_Nactrypta_c in Cytosol = 0;
  species $M_Lkynr_ex in Cytosol = 0; M_Lkynr_ex is "M_LKyn_ex";

  // Parameters:
  scaling = 1;
  AADAT_E_T_kat1 = 9455.136; AADAT_E_T_kat1 is "KAT1_E_T";
  AADAT_E_T_kat2 = 7744.315; AADAT_E_T_kat2 is "KAT2_E_T";
  AADAT_E_T_kat3 = 15588.21; AADAT_E_T_kat3 is "KAT3_E_T";
  AADAT_Km_hLkynr = 3.8; AADAT_Km_hLkynr is "KAT_Km_3HKyn";  // isDescribedBy pubmed:18620547
  AADAT_Km_Lkynr = 4.7; AADAT_Km_Lkynr is "KAT_Km_L-kyn";  // isDescribedBy pubmed:18620547
  AANAT_E_T = 2770.968;
  AANAT_Km_Srtn = 1.35; AANAT_Km_Srtn is "AANAT_Km_Serotonin";
  AANAT_Km_trypta = 0.88; AANAT_Km_trypta is "AANAT_Km_Trypta";
  AFMID_E_T = 15820.22;
  AFMID_Km_5hoxnfky = 0.4; AFMID_Km_5hoxnfky is "AFMID_Km_5HFKyn";
  AFMID_Km_Lfmkynr = 0.05; AFMID_Km_Lfmkynr is "AFMID_Km_FKyn";
  AFMID_Km_nformanth = 0.211; AFMID_Km_nformanth is "AFMID_Km_FAA";
  DDC_E_T = 36074.91;
  DDC_Km_5htrp = 0.049;
  DDC_Km_trp_DASH_L = 10; DDC_Km_trp_DASH_L is "DDC_Km_Trp";
  IDO_E_T = 453.4834;
  IDO_Km_trp_DASH_L = 0.045; IDO_Km_trp_DASH_L is "IDO_Km_Trp";
  IDO_Km_5htrp = 0.02;
  IDO_Km_srtn = 0.1; IDO_Km_srtn is "IDO_Km_Serotonin";
  IMNT_E_T = 4186.587;
  IMNT_Km_srtn = 1.38; IMNT_Km_srtn is "IMNT_Km_Serotonin";
  IMNT_Km_trypta = 0.27; IMNT_Km_trypta is "IMNT_Km_Trypta";
  IMNT_Km_nmtrpta = 0.086; IMNT_Km_nmtrpta is "IMNT_Km_MTrypta";
  KYNU_Km_hLkynr = 0.028; KYNU_Km_hLkynr is "KYNU_Km_3HKyn";
  Transporter_E_T_Slc7a8 = 2226.373;
  KYNU_E_T = 56601.76;
  KYNU_Km_Lfmkynr = 2.2; KYNU_Km_Lfmkynr is "KYNU_Km_FKyn";
  KYNU_Km_Lkynr = 0.495; KYNU_Km_Lkynr is "KYNU_Km_L-kyn";
  Transporter_Km_Lkynr = 0.032; Transporter_Km_Lkynr is "Transporter_Km_L-kyn";
  Transporter_Km_Trp_Slc7a8 = 0.0573;
  Transporter_E_T_Slc7a5 = 1961.514;
  Transporter_Km_Trp_Slc7a5 = 0.019;
  MAOA_E_T = 137204.8;
  MAOB_E_T = 2.94114875e5;
  MAO_Km_srtn = 0.43; MAO_Km_srtn is "MAO_Km_Serotonin";
  MAO_Km_trypta = 0.033; MAO_Km_trypta is "MAO_Km_Trypta";
  IDO_Km_O2 = 0.042;
  AADAT_kcat_hLkynr = 1.7; AADAT_kcat_hLkynr is "KAT_kcat_3HKyn";  // isDescribedBy pubmed:18620547
  AADAT_kcat_Lkynr = 9.76; AADAT_kcat_Lkynr is "KAT_kcat_L-kyn";  // isDescribedBy pubmed:18620547
  Transporter_kcat_Trp = 1.3;
  Transporter_kcat_Lkynr = 1.3; Transporter_kcat_Lkynr is "Transporter_kcat_L-kyn";

  // Reactions:
  IL4I1: M_trp_DASH_L_c + $M_h2o_c + $M_o2_c => $M_indpyr_c + $M_nh4_c + $M_h2o2_c; Cytosol*function_4_IL4I1_kcat_set_to_1(IL4I1_E_T, IL4I1_Ka, IL4I1_Kb, M_h2o_c, M_o2_c, M_trp_DASH_L_c, IL4I1_kcat, scaling);  // ec-code:1.4.3.2; kegg.reaction:R00677; isEncodedBy ncbigene:259307; isDescribedBy pubmed:15383589
    IL4I1_E_T = 2046.74; IL4I1_Ka = 6.5; IL4I1_Kb = 1.2; IL4I1_kcat = 1;
  R00678_Tdo: M_trp_DASH_L_c + $M_o2_c => M_Lfmkynr_c; Cytosol*function_4_TDO_1(R00678_Tdo_E_T, R00678_Tdo_Ka, R00678_Tdo_Kb, M_o2_c, M_trp_DASH_L_c, R00678_Tdo_kcat, scaling); R00678_Tdo is "TDO";  // ec-code:1.13.11.11; kegg.reaction:R00678; isEncodedBy ncbigene:6999; isDescribedBy pubmed:18370401
    R00678_Tdo_E_T = 943912; R00678_Tdo_Ka = 0.222; R00678_Tdo_Kb = 0.037; R00678_Tdo_kcat = 1.4;
  // km and kcat values taken from 4991409 (pig)
  DDC_Trypta: M_trp_DASH_L_c => M_trypta_c + $M_co2_c; Cytosol*function_4_DDC_trypta(DDC_E_T, DDC_Km_5htrp, DDC_Km_trp_DASH_L, M_5htrp_c, M_trp_DASH_L_c, DDC_Trypta_kcat_B, scaling);  // modifiers: M_5htrp_c; kegg.reaction:R00685; ec-code:4.1.1.28; isEncodedBy ncbigene:1644; isDescribedBy pubmed:4991409
    DDC_Trypta_kcat_B = 0.38;
  KYNU_L_Kyn: M_Lkynr_c + $M_h2o_c => $M_anth_c + $M_ala_DASH_L_c; Cytosol*function_4_KYNU_Lkynr(KYNU_E_T, KYNU_Km_Lfmkynr, KYNU_Km_Lkynr, KYNU_Km_hLkynr, M_Lfmkynr_c, M_Lkynr_c, M_hLkynr_c, KYNU_L_Kyn_kcat_A, scaling); KYNU_L_Kyn is "KYNU_L-Kyn";  // modifiers: M_hLkynr_c, M_Lfmkynr_c; ec-code:3.7.1.3; kegg.reaction:R00987; isEncodedBy ncbigene:8942; isDescribedBy pubmed:19143568
    KYNU_L_Kyn_kcat_A = 0.23;
  R01814_Tph1: $M_thbpt + M_trp_DASH_L_c + $M_o2_c => M_5htrp_c + $M_dhbpt_c + $M_h2o_c; Cytosol*function_4_TPH1(R01814_Tph1_E_T, R01814_Tph1_Ka, R01814_Tph1_Kb, M_o2_c, M_thbpt, M_trp_DASH_L_c, R01814_Tph1_kcat, scaling); R01814_Tph1 is "TPH1";  // ec-code:1.14.16.4; kegg.reaction:R01814; isEncodedBy ncbigene:7166; isDescribedBy pubmed:15663479
    R01814_Tph1_E_T = 503.141; R01814_Tph1_Ka = 0.0228; R01814_Tph1_Kb = 0.109; R01814_Tph1_kcat = 0.57;
  R01956_Kat1: M_Lkynr_c + $M_akg_c => $M_kynate_c + $M_glu_DASH_L_c; Cytosol*function_4_AADAT_Lkynr_kat1(AADAT_E_T_kat1, AADAT_Km_Lkynr, AADAT_Km_hLkynr, AADAT_kcat_Lkynr, M_Lkynr_c, M_hLkynr_c, scaling); R01956_Kat1 is "KAT1_L-Kyn";  // modifiers: M_hLkynr_c; kegg.reaction:R01956; ec-code:2.6.1.7; isEncodedBy ncbigene:883; isDescribedBy pubmed:18620547
  AFMID_FKyn: M_Lfmkynr_c + $M_h2o_c => $M_for_c + M_Lkynr_c; Cytosol*function_4_AFMID_lfmkynr(AFMID_E_T, AFMID_Km_5hoxnfky, AFMID_Km_Lfmkynr, AFMID_Km_nformanth, M_5hoxnfkyn_c, M_Lfmkynr_c, M_nformanth_c, AFMID_FKyn_kcat_A, scaling);  // modifiers: M_5hoxnfkyn_c, M_nformanth_c; ec-code:3.5.1.9; kegg.reaction:R01959; isEncodedBy ncbigene:125061; occursIn brenda:209258
    AFMID_FKyn_kcat_A = 100;
  KMO: M_Lkynr_c + $M_o2_c + $M_nadph_c + $M_h_c => M_hLkynr_c + $M_nadp_c + $M_h2o_c; Cytosol*function_4_KMO_1(KMO_E_T, KMO_Ka, KMO_Kb, Kc, M_Lkynr_c, M_h_c, M_nadph_c, M_o2_c, KMO_kcat, scaling);  // ec-code:1.14.13.9; kegg.reaction:R01960; isEncodedBy ncbigene:8564; isDescribedBy pubmed:16973376
    KMO_E_T = 9766.18; KMO_Ka = 0.1; KMO_Kb = 0.071; Kc = 0.153; KMO_kcat = 2.2;
  INMT_Trypta: $M_amet_c + M_trypta_c => $M_ahcys_c + M_nmtrpta_c; Cytosol*function_4_INMT_trypta(IMNT_E_T, IMNT_Km_nmtrpta, IMNT_Km_srtn, IMNT_Km_trypta, M_nmtrpta_c, M_srtn_c, M_trypta_c, INMT_Trypta_kcat_A, scaling);  // modifiers: M_srtn_c; kegg.reaction:R02174; ec-code:2.1.1.49; isEncodedBy ncbigene:11185; occursIn brenda:441354
    INMT_Trypta_kcat_A = 0.4;
  HAAO: M_3hanthrn_c + $M_o2_c => M_cmusa_c; Cytosol*function_4_HAAO_1(HAAO_E_T, HAAO_Ka, HAAO_Kb, M_3hanthrn_c, M_o2_c, HAAO_kcat, scaling);  // modifiers: M_quln_c, M_anth_c; ec-code:1.13.11.6; kegg.reaction:R02665; isEncodedBy ncbigene:23498; occursIn brenda:439367
    HAAO_E_T = 1.03084e4; HAAO_Ka = 0.016; HAAO_Kb = 0.615; HAAO_kcat = 64;
  KYNU_3HKyn: M_hLkynr_c + $M_h2o_c => M_3hanthrn_c + $M_ala_DASH_L_c; Cytosol*function_4_KYNU_hLkynr(KYNU_E_T, KYNU_Km_Lfmkynr, KYNU_Km_Lkynr, KYNU_Km_hLkynr, M_Lfmkynr_c, M_Lkynr_c, M_hLkynr_c, KYNU_3HKyn_kcat_A, scaling);  // modifiers: M_Lkynr_c, M_Lfmkynr_c; ec-code:3.7.1.3; kegg.reaction:R02668; isEncodedBy ncbigene:8942; isDescribedBy pubmed:19143568
    KYNU_3HKyn_kcat_A = 3.5;
  DDC_5HTrp: M_5htrp_c => M_srtn_c + $M_co2_c; Cytosol*function_4_DDC_5HT(DDC_E_T, DDC_Km_5htrp, DDC_Km_trp_DASH_L, M_5htrp_c, M_trp_DASH_L_c, DDC_5HTrp_kcat_B, scaling);  // modifiers: M_trp_DASH_L_c; ec-code:4.1.1.28; kegg.reaction:R02701; isEncodedBy ncbigene:1644; isDescribedBy pubmed:18547057
    DDC_5HTrp_kcat_B = 2;
  IDO_5HTrp: M_5htrp_c + $M_o2_c => M_5hoxnfkyn_c; Cytosol*function_4_IDO_5HT_1(IDO_E_T, IDO_Km_5htrp, IDO_Km_O2, IDO_Km_srtn, IDO_Km_trp_DASH_L, M_5htrp_c, M_o2_c, M_srtn_c, M_trp_DASH_L_c, IDO_5HTrp_kcat, scaling);  // modifiers: M_trp_DASH_L_c, M_srtn_c; ec-code:1.13.11.52; kegg.reaction:R02702; isEncodedBy ncbigene:3620; occursIn brenda:685239
    IDO_5HTrp_kcat = 0.043;
  WARS: $M_atp_c + M_trp_DASH_L_c + $M_trna_trp_c => $M_amp_c + $M_ppi_c + $M_trp_L_trna_c; Cytosol*function_4_WARS2_tRNA_recombinant_assume_km_equal_Ka_or_Kb(WARS_E_T, WARS_Ka, WARS_Kb, M_atp_c, M_trna_trp_c, M_trp_DASH_L_c, WARS_kcat, scaling);  // ec-code:6.1.1.2; kegg.reaction:R03664; isEncodedBy ncbigene:7453; occursIn brenda:653740
    WARS_E_T = 1.59615e4; WARS_Ka = 0.0074; WARS_Kb = 0.0011; WARS_kcat = 1.1;
  AFMID_5HFKyn: M_5hoxnfkyn_c + $M_h2o_c => $M_5hxkyn_c + $M_for_c; Cytosol*function_4_AFMID_5HNFK(AFMID_E_T, AFMID_Km_5hoxnfky, AFMID_Km_Lfmkynr, AFMID_Km_nformanth, M_5hoxnfkyn_c, M_Lfmkynr_c, M_nformanth_c, AFMID_5HFKyn_kcat_A, scaling);  // modifiers: M_Lfmkynr_c, M_nformanth_c; kegg.reaction:R04911; ec-code:3.5.1.9; isEncodedBy ncbigene:125061; occursIn brenda:209255
    AFMID_5HFKyn_kcat_A = 100;
  quin_form: M_cmusa_c => M_quln_c; Cytosol*quin_form_k1*M_cmusa_c; quin_form is "Quinolic Acid formation (spontaneous)";  // isDescribedBy pubmed:15656614
    quin_form_k1 = 0.00025;
  R02173_Maoa: M_trypta_c + $M_h2o_c + $M_o2_c => $M_id3acald_c + $M_nh4_c + $M_h2o2_c; Cytosol*function_4_MAOA_Trypta(MAOA_E_T, MAO_Km_srtn, MAO_Km_trypta, M_srtn_c, M_trypta_c, R02173_Maoa_kcat_B, scaling); R02173_Maoa is "MAOA_Trypta";  // modifiers: M_srtn_c; ec-code:1.4.3.4; kegg.reaction:R02173; isEncodedBy ncbigene:4128; isDescribedBy pubmed:11754741
    R02173_Maoa_kcat_B = 3.5;
  Cinnavalinate_formation: 2 M_3hanthrn_c + 4 $M_o2_c => $M_Cinnavalininate_c + 2 $M_o2s_c + 2 $M_h2o2_c + 2 $M_h_c; Cytosol*function_1(M_3hanthrn_c, M_o2_c, e1, e2, Cinnavalinate_formation_k1);  // ec-code:1.11.1.6; kegg.reaction:R02670; isDescribedBy pubmed:2949752
    e1 = 2; e2 = 4; Cinnavalinate_formation_k1 = 5.6667e-5;
  TRPtrans_Slc7a5: $TRP_ex -> M_trp_DASH_L_c; Cytosol*Slc7a5_Trp_1(M_Lkynr_c, M_Lkynr_ex, M_trp_DASH_L_c, TRP_ex, Transporter_E_T_Slc7a5, Transporter_Km_Lkynr, Transporter_Km_Trp_Slc7a5, Transporter_kcat_Trp, scaling); TRPtrans_Slc7a5 is "Tryptophan_Transport Slc7a5";  // modifiers: M_Lkynr_ex, M_Lkynr_c; uniprot:Q01650; isEncodedBy ncbigene:8140; isDescribedBy pubmed:2872885
  R00678_Indo: M_trp_DASH_L_c + $M_o2_c => M_Lfmkynr_c; Cytosol*function_4_IDO_1(IDO_E_T, IDO_Km_5htrp, IDO_Km_O2, IDO_Km_srtn, IDO_Km_trp_DASH_L, M_5htrp_c, M_o2_c, M_srtn_c, M_trp_DASH_L_c, R00678_Indo_kcat, scaling); R00678_Indo is "IDO";  // modifiers: M_5htrp_c, M_srtn_c; ec-code:1.13.11.52; kegg.reaction:R00678; isEncodedBy ncbigene:3620; isDescribedBy pubmed:26687
    R00678_Indo_kcat = 1.65;
  QPRT: $M_h_c + $M_prpp_c + M_quln_c => $M_co2_c + M_nicrnt_c + $M_ppi_c; Cytosol*function_4_QPRT(QPRT_E_T, QPRT_Ka, QPRT_Kb, M_h_c, M_prpp_c, M_quln_c, QPRT_kcat, scaling);  // kegg.reaction:R03348; ec-code:2.4.2.19; isEncodedBy ncbigene:23475; occursIn brenda:693620
    QPRT_E_T = 138709; QPRT_Ka = 0.022; QPRT_Kb = 0.023; QPRT_kcat = 0.255;
  KYNU_FKyn: M_Lfmkynr_c + $M_h2o_c => M_nformanth_c + $M_ala_DASH_L_c; Cytosol*function_4_KYNU_Lfmkyn(KYNU_E_T, KYNU_Km_Lfmkynr, KYNU_Km_Lkynr, KYNU_Km_hLkynr, M_Lfmkynr_c, M_Lkynr_c, M_hLkynr_c, KYNU_FKyn_kcat_A, scaling);  // modifiers: M_Lkynr_c, M_hLkynr_c; kegg.reaction:R03936; ec-code:3.7.1.3; isEncodedBy ncbigene:8942; isDescribedBy pubmed:118164
    KYNU_FKyn_kcat_A = 0.013;
  AFMID_FAA: M_nformanth_c + $M_h2o_c => $M_for_c + $M_anth_c; Cytosol*function_4_AFMID_nform(AFMID_E_T, AFMID_Km_5hoxnfky, AFMID_Km_Lfmkynr, AFMID_Km_nformanth, M_5hoxnfkyn_c, M_Lfmkynr_c, M_nformanth_c, AFMID_FAA_kcat_A, scaling);  // modifiers: M_Lfmkynr_c, M_5hoxnfkyn_c; kegg.reaction:R00988; ec-code:3.5.1.9; isEncodedBy ncbigene:125061; isDescribedBy pubmed:4190298
    AFMID_FAA_kcat_A = 13.57;
  // Km and kcat values taken from 17402747
  NMNAT1: $M_atp_c + $M_h_c + M_nicrnt_c => $M_dnad_c + $M_ppi_c; Cytosol*function_4_NMNAT1(NMNAT1_E_T, NMNAT1_Km, M_atp_c, M_h_c, M_nicrnt_c, NMNAT1_kcat, scaling);  // ec-code:2.7.7.1; kegg.reaction:R03005; isEncodedBy ncbigene:64802; isDescribedBy pubmed:17402747
    NMNAT1_E_T = 4658.65; NMNAT1_Km = 0.0677; NMNAT1_kcat = 42.9;
  ACMSD: M_cmusa_c => $M_am6sa_c + $M_co2_c; Cytosol*function_4_ACMSD(ACMSD_E_T, ACMSD_Km, M_cmusa_c, ACMSD_kcat, scaling);  // modifiers: M_quln_c, M_kynate_c; ec-code:4.1.1.45; kegg.reaction:R04323; isEncodedBy ncbigene:130013; occursIn brenda:679800
    ACMSD_E_T = 4.88582e4; ACMSD_Km = 0.0065; ACMSD_kcat = 1;
  R02908_Maoa: M_srtn_c + $M_h2o_c + $M_o2_c => $M_5hoxindact_c + $M_h2o2_c + $M_nh4_c; Cytosol*function_4_MAOA_SRTN(MAOA_E_T, MAO_Km_srtn, MAO_Km_trypta, M_srtn_c, M_trypta_c, R02908_Maoa_kcat_B, scaling); R02908_Maoa is "MAOA_Serotonin";  // modifiers: M_trypta_c, M_5hxkyn_c; ec-code:1.4.3.4; kegg.reaction:R02908; isEncodedBy ncbigene:4128; isDescribedBy pubmed:15848762
    R02908_Maoa_kcat_B = 18.6;
  AANAT_Serotonin: $M_accoa_c + M_srtn_c => $M_Nacsertn_c + $M_coa_c + $M_h_c; Cytosol*function_4_AANAT_Srtn(AANAT_E_T, AANAT_Km_Srtn, AANAT_Km_trypta, M_srtn_c, M_trypta_c, AANAT_Serotonin_kcat_B, scaling);  // modifiers: M_trypta_c; kegg.reaction:R02911; ec-code:2.3.1.87; isEncodedBy ncbigene:15; isDescribedBy pubmed:15477086
    AANAT_Serotonin_kcat_B = 25.9;
  R04171_Kat1: M_hLkynr_c + $M_akg_c => $M_Xanthurenate + $M_glu_DASH_L_c; Cytosol*function_4_AADAT_hLkynr_kat1(AADAT_E_T_kat1, AADAT_Km_Lkynr, AADAT_Km_hLkynr, AADAT_kcat_hLkynr, M_Lkynr_c, M_hLkynr_c, scaling); R04171_Kat1 is "KAT1_3HKyn";  // modifiers: M_Lkynr_c; ec-code:2.6.1.7; kegg.reaction:R04171; isEncodedBy ncbigene:883; isDescribedBy pubmed:18620547
  IDO_Serotonin: M_srtn_c + $M_o2_c => $M_f5hoxkyn_c; Cytosol*function_4_IDO_SRTN_1(IDO_E_T, IDO_Km_5htrp, IDO_Km_O2, IDO_Km_srtn, IDO_Km_trp_DASH_L, M_5htrp_c, M_o2_c, M_srtn_c, M_trp_DASH_L_c, IDO_Serotonin_kcat, scaling);  // modifiers: M_5htrp_c, M_trp_DASH_L_c; kegg.reaction:R02909; ec-code:1.13.11.52; isEncodedBy ncbigene:3620; isDescribedBy pubmed:19737010
    IDO_Serotonin_kcat = 0.002;
  R02174_metTrypta: $M_amet_c + M_nmtrpta_c => $M_ahcys_c + $M_nndmtrpta_c; Cytosol*function_4_INMT_methyltrypta(IMNT_E_T, IMNT_Km_nmtrpta, IMNT_Km_srtn, IMNT_Km_trypta, M_nmtrpta_c, M_srtn_c, M_trypta_c, R02174_metTrypta_kcat_A, scaling); R02174_metTrypta is "INMT_MTrypta";  // modifiers: M_srtn_c, M_trypta_c; ec-code:2.1.1.49; isEncodedBy ncbigene:11185; isDescribedBy pubmed:9852119
    R02174_metTrypta_kcat_A = 0.176;
  INMT_Serotonin: $M_amet_c + M_srtn_c => $M_ahcys_c + $M_nmsrtn_c; Cytosol*function_4_INMT_SRTN(IMNT_E_T, IMNT_Km_nmtrpta, IMNT_Km_srtn, IMNT_Km_trypta, M_nmtrpta_c, M_srtn_c, M_trypta_c, INMT_Serotonin_kcat_A, scaling);  // modifiers: M_nmtrpta_c, M_trypta_c; kegg.reaction:R02910; ec-code:2.1.1.49; isEncodedBy ncbigene:11185; isDescribedBy pubmed:9852119
    INMT_Serotonin_kcat_A = 0.044;
  R01956_Kat2: M_hLkynr_c + $M_akg_c => $M_Xanthurenate + $M_glu_DASH_L_c; Cytosol*function_4_AADAT_hLkynr_kat2(AADAT_E_T_kat2, AADAT_Km_Lkynr, AADAT_Km_hLkynr, AADAT_kcat_hLkynr, M_Lkynr_c, M_hLkynr_c, scaling); R01956_Kat2 is "KAT2_3HKyn";  // modifiers: M_Lkynr_c; kegg.reaction:R04171; ec-code:2.6.1.7; isEncodedBy ncbigene:51166; isDescribedBy pubmed:18620547
  R01956_Kat3: M_hLkynr_c + $M_akg_c => $M_Xanthurenate + $M_glu_DASH_L_c; Cytosol*function_4_AADAT_hLkynr_kat3(AADAT_E_T_kat3, AADAT_Km_Lkynr, AADAT_Km_hLkynr, AADAT_kcat_hLkynr, M_Lkynr_c, M_hLkynr_c, scaling); R01956_Kat3 is "KAT3_3HKyn";  // modifiers: M_Lkynr_c; kegg.reaction:R04171; ec-code:2.6.1.7; isEncodedBy ncbigene:56267; isDescribedBy pubmed:18620547
  R04171_Kat2: M_Lkynr_c + $M_akg_c => $M_kynate_c + $M_glu_DASH_L_c; Cytosol*function_4_AADAT_Lkynr_kat2(AADAT_E_T_kat2, AADAT_Km_Lkynr, AADAT_Km_hLkynr, AADAT_kcat_Lkynr, M_Lkynr_c, M_hLkynr_c, scaling); R04171_Kat2 is "KAT2_L-Kyn";  // modifiers: M_hLkynr_c; kegg.reaction:R01956; ec-code:2.6.1.7; isEncodedBy ncbigene:51166; isDescribedBy pubmed:18620547
  R04171_Kat3: M_Lkynr_c + $M_akg_c => $M_kynate_c + $M_glu_DASH_L_c; Cytosol*function_4_AADAT_Lkynr_kat3(AADAT_E_T_kat3, AADAT_Km_Lkynr, AADAT_Km_hLkynr, AADAT_kcat_Lkynr, M_Lkynr_c, M_hLkynr_c, scaling); R04171_Kat3 is "KAT3_L-Kyn";  // modifiers: M_hLkynr_c; kegg.reaction:R01956; ec-code:2.6.1.7; isEncodedBy ncbigene:56267; isDescribedBy pubmed:18620547
  R02908_Maob: M_srtn_c + $M_h2o_c + $M_o2_c => $M_5hoxindact_c + $M_h2o2_c + $M_nh4_c; Cytosol*function_4_MAOB_SRTN(MAOB_E_T, MAO_Km_srtn, MAO_Km_trypta, M_srtn_c, M_trypta_c, R02908_Maob_kcat_B, scaling); R02908_Maob is "MAOB_Serotonin";  // modifiers: M_trypta_c, M_5hxkyn_c; kegg.reaction:R02908; ec-code:1.4.3.4; isEncodedBy ncbigene:4129; isDescribedBy pubmed:15848762
    R02908_Maob_kcat_B = 18.6;
  R02173_Maob: M_trypta_c + $M_h2o_c + $M_o2_c => $M_id3acald_c + $M_nh4_c + $M_h2o2_c; Cytosol*function_4_MAOB_Trypta(MAOB_E_T, MAO_Km_srtn, MAO_Km_trypta, M_srtn_c, M_trypta_c, R02173_Maob_kcat_B, scaling); R02173_Maob is "MAOB_Trypta";  // modifiers: M_srtn_c; kegg.reaction:R02173; ec-code:1.4.3.4; isEncodedBy ncbigene:4129; isDescribedBy pubmed:11754741
    R02173_Maob_kcat_B = 3.5;
  AANAT_Trypta: $M_accoa_c + M_trypta_c => $M_Nactrypta_c + $M_coa_c + $M_h_c; Cytosol*function_4_AANAT_trypta(AANAT_E_T, AANAT_Km_Srtn, AANAT_Km_trypta, M_srtn_c, M_trypta_c, AANAT_Trypta_kcat_B, scaling);  // modifiers: M_srtn_c; ec-code:2.3.1.87; isEncodedBy ncbigene:15; isDescribedBy pubmed:18771288; isDescribedBy pubmed:15477086
    AANAT_Trypta_kcat_B = 25.9;
  R01814_Tph2: $M_thbpt + M_trp_DASH_L_c + $M_o2_c => M_5htrp_c + $M_dhbpt_c + $M_h2o_c; Cytosol*function_4_TPH2(R01814_Tph2_E_T, R01814_Tph2_Ka, R01814_Tph2_Kb, M_o2_c, M_thbpt, M_trp_DASH_L_c, R01814_Tph2_kcat, scaling); R01814_Tph2 is "TPH2";  // kegg.reaction:R01814; ec-code:1.14.16.4; isEncodedBy ncbigene:121278; isDescribedBy pubmed:15663479
    R01814_Tph2_E_T = 235.128; R01814_Tph2_Ka = 0.0403; R01814_Tph2_Kb = 0.273; R01814_Tph2_kcat = 0.18;
  TRPtrans_Slc7a8: $TRP_ex -> M_trp_DASH_L_c; Cytosol*Slc7a8_Trp_1(M_Lkynr_c, M_Lkynr_ex, M_trp_DASH_L_c, TRP_ex, Transporter_E_T_Slc7a8, Transporter_Km_Lkynr, Transporter_Km_Trp_Slc7a8, Transporter_kcat_Trp, scaling); TRPtrans_Slc7a8 is "Tryptophan_Transport Slc7a8";  // modifiers: M_Lkynr_ex, M_Lkynr_c; uniprot:Q9UHI5; isEncodedBy ncbigene:23428; isDescribedBy pubmed:2872885
  Lkynr_trans_Slc7a5: M_Lkynr_c -> $M_Lkynr_ex; Cytosol*Slc7a5_LKyn_1(M_Lkynr_c, M_Lkynr_ex, M_trp_DASH_L_c, TRP_ex, Transporter_E_T_Slc7a5, Transporter_Km_Lkynr, Transporter_Km_Trp_Slc7a5, Transporter_kcat_Lkynr, scaling); Lkynr_trans_Slc7a5 is "Lkynr_Transporter_Slc7a5";  // modifiers: M_trp_DASH_L_c, TRP_ex; uniprot:Q01650; ncbigene:8140; isDescribedBy pubmed:2723766; isDescribedBy pubmed:2872885
  Lkynr_trans_Slc7a8: M_Lkynr_c -> $M_Lkynr_ex; Cytosol*Slc7a8_LKyn_1(M_Lkynr_c, M_Lkynr_ex, M_trp_DASH_L_c, TRP_ex, Transporter_E_T_Slc7a8, Transporter_Km_Lkynr, Transporter_Km_Trp_Slc7a8, Transporter_kcat_Lkynr, scaling); Lkynr_trans_Slc7a8 is "Lkynr_Transporter_Slc7a8";  // modifiers: M_trp_DASH_L_c, TRP_ex; uniprot:Q9UHI5; isEncodedBy ncbigene:23428; isDescribedBy pubmed:2723766; isDescribedBy pubmed:2872885
end
